// SBML level 2 version 1

function Rate_Law_for_R1(p, M)
  p*M;
end

function Rate_Law_for_R4(p, mod)
  1/p*mod;
end

function Rate_Law_for_R5(p1, p2)
  1/p1*p2;
end

function Rate_Law_for_R2fhn(p, V)
  1/3*V^3*p;
end

function Rate_Law_for_R6(p1, p2, S)
  1/p1*p2*S;
end

model New_Model()

  // Compartments:
  compartment compartment = 1;

  // Species:
  species V in compartment = -1;
  species R in compartment = 1;

  // Parameters:
  alpha = 0.2;
  beta = 0.2;
  gamma = 3;

  // Reactions:
  R1: => V; compartment*Rate_Law_for_R1(gamma, V);
  R2: V => ; compartment*Rate_Law_for_R2fhn(gamma, V);
  R3: => V; compartment*Rate_Law_for_R1(gamma, R);  // modifiers: R
  R4: R => ; compartment*Rate_Law_for_R4(gamma, V);  // modifiers: V
  R5: => R; compartment*Rate_Law_for_R5(gamma, alpha);
  R6: R => ; compartment*Rate_Law_for_R6(gamma, beta, R);

  // Unit definitions:
  unit volume = 1e-3 litre;
  unit substance = item;
end
