// SBML level 2 version 1

function Rate_Law_for_R2(X, Y, p)
  X*Y*p;
end

model New_Model()

  // Compartments:
  compartment compartment = 1;

  // Species:
  species A in compartment = 10;
  species B in compartment = 10;

  // Parameters:
  alpha = 1;
  beta = 0.2;
  gamma = 1;
  delta = 0.15;

  // Reactions:
  R1: A => 2 A; compartment*alpha*A;
  R2: A => ; compartment*Rate_Law_for_R2(A, B, beta);  // modifiers: B
  R4: B => ; compartment*gamma*B;
  R3: B => 2 B; compartment*Rate_Law_for_R2(B, A, delta);  // modifiers: A

  // Unit definitions:
  unit volume = 1e-3 litre;
  unit substance = item;
end
